# OpenSim document version 40000
Model SohnFullBody:
  gravity: 0 -9.80665 0
  length_units: meters
  force_units: N
  credits:
    Delp S.L., Loan J.P., Hoy M.G., Zajac F.E., Topp E.L., Rosen J.M., Thelen D.G., Anderson F.C., Seth A., Hamner S.R., Arnold E., Raabe M.E.
  publications:
    Notes: Modified from Raabe Full Body model. Raabe Full Body model combines Hamner Full Body Model 2010, Christophy 2012 Lumbar DOF torso, and Arnold patella; 3D, 23 DOF gait model created by D.G. Thelen, Univ. of Wisconsin-Madison, and Samuel Hamner, Ajay Seth, Frank C. Anderson, and Scott L. Delp, Stanford University. Lower extremity joint defintions based on Delp et al. (1990). Low back joint and anthropometry based on Anderson and Pandy (1999, 2001). Planar knee model of Yamaguchi and Zajac (1989). Hamner added arms adapted from Holzbaur et al., 2005. Hamner, S.R., Seth, A, Delp, S.L.: Muscle contributions to propulsion and support during running. Journal of Biomechanics, 2010. Delp, S.L., Loan, J.P., Hoy, M.G., Zajac, F.E., Topp E.L., Rosen, J.M.: An interactive graphics-based model of the lower extremity to study orthopaedic surgical procedures, IEEE Transactions on Biomedical Engineering, vol. 37, pp. 757-767, 1990. Yamaguchi G.T., Zajac F.E.: A planar model of the knee joint to characterize the knee extensor mechanism." J . Biomech. vol. 21. pp. 1-10. 1989. Anderson F.C., Pandy M.G.: A dynamic optimization solution for vertical jumping in three dimensions. Computer Methods in Biomechanics and Biomedical Engineering 2:201-231, 1999. Anderson F.C., Pandy M.G.: Dynamic optimization of human walking. Journal of Biomechanical Engineering 123:381-390, 2001. Holzbaur, KR, WM Murray and SL Delp, 2005. A model of the upper extremity for simulating musculoskeletal surgery and analyzing neuromuscular control. Ann Biomed Eng 33(6): 829-840.
  Ground
  BodySet:
    Body pelvis: mass=11.777 [kg] mass_center=(-0.0707 0 0) inertia=(0.1028 0.0871 0.0579 0 0 0)
        meshes=(r_pelvis.vtp l_pelvis.vtp)
    Body sacrum: mass=0 mass_center=(0 0 0) inertia=(0 0 0 0 0 0) meshes=sacrum.vtp
    Body femur_r: mass=9.3014 mass_center=(0 -0.17 0) inertia=(0.1339 0.0351 0.1412 0 0 0) meshes=femur_r.vtp
    Body patella_r: mass=0.0862 mass_center=(0.0018 0.0264 0) inertia=(2.87e-6 1.311e-5 1.311e-5 0 0 0)
        meshes=r_patella.vtp
    Body tibia_r: mass=3.7075 mass_center=(0 -0.1867 0) inertia=(0.0504 0.0051 0.0511 0 0 0)
        meshes=(tibia_r.vtp fibula_r.vtp)
    Body talus_r: mass=0.1 mass_center=(0 0 0) inertia=(0.001 0.001 0.001 0 0 0) meshes=talus_rv.vtp
    Body calcn_r: mass=1.25 mass_center=(0.1 0.03 0) inertia=(0.0014 0.0039 0.0041 0 0 0) meshes=foot.vtp
    Body toes_r: mass=0.2166 mass_center=(0.0346 0.006 -0.0175) inertia=(0.0001 0.0002 0.001 0 0 0) meshes=bofoot.vtp
    Body femur_l: mass=9.3014 mass_center=(0 -0.17 0) inertia=(0.1339 0.0351 0.1412 0 0 0) meshes=femur_l.vtp
    Body patella_l: mass=0.0862 mass_center=(0.0018 0.0264 0) inertia=(2.87e-6 1.311e-5 1.311e-5 0 0 0)
        meshes=l_patella.vtp
    Body tibia_l: mass=3.7075 mass_center=(0 -0.1867 0) inertia=(0.0504 0.0051 0.0511 0 0 0)
        meshes=(tibia_l.vtp fibula_l.vtp)
    Body talus_l: mass=0.1 mass_center=(0 0 0) inertia=(0.001 0.001 0.001 0 0 0) meshes=talus_lv.vtp
    Body calcn_l: mass=1.25 mass_center=(0.1 0.03 0) inertia=(0.0014 0.0039 0.0041 0 0 0) meshes=l_foot.vtp
    Body toes_l: mass=0.2166 mass_center=(0.0346 0.006 0.0175) inertia=(0.0001 0.0002 0.001 0 0 0) meshes=l_bofoot.vtp
    Body lumbar5: mass=1.824 mass_center=(0.01728 0.0183 0) inertia=(0.178216 0.0217274 0.171486 0 0 0)
        meshes=lumbar5.vtp
    Body lumbar4: mass=1.799 mass_center=(0.0186 0.0217953 0) inertia=(0.171208 0.0206792 0.165178 0 0 0)
        meshes=lumbar4.vtp
    Body lumbar3: mass=1.67 mass_center=(0.0178939 0.0232739 0) inertia=(0.157697 0.0199107 0.152447 0 0 0)
        meshes=lumbar3.vtp
    Body lumbar2: mass=1.689 mass_center=(0.0252462 0.0202124 0) inertia=(0.162705 0.0219751 0.157705 0 0 0)
        meshes=lumbar2.vtp
    Body lumbar1: mass=1.677 mass_center=(0.03274 0.0194073 0.00132891) inertia=(0.162657 0.0241312 0.157927 0 0 0)
        meshes=lumbar1.vtp
    Body torso: mass=18.1676 mass_center=(-0.03 0.32 0) inertia=(1.19239 0.513346 1.1632 0 0 0)
        meshes=(cerv1sm.vtp cerv2sm.vtp cerv3sm.vtp cerv4sm.vtp cerv5sm.vtp cerv6sm.vtp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)
      WrapCylinder Cylinder: translation=(-0.208 0.04 0) quadrant=all radius=0.17 length=0.26
      WrapEllipsoid Chest_r: xyz_body_rotation=(0 -0.4 0.2) translation=(0 0.21 0.01) quadrant=z
          dimensions=(0.075 0.17 0.13)
      WrapEllipsoid Chest_l: xyz_body_rotation=(0 0.4 0.2) translation=(0 0.21 -0.01) quadrant=-z
          dimensions=(0.075 0.17 0.13)
    Body Abdomen: mass=0.001 mass_center=(0.008 0 0) inertia=(1.78e-6 5.8e-7 1.36e-6 0 0 0)
      WrapEllipsoid Abdomen: translation=(0 0 0) quadrant=x dimensions=(0.01 0.08 0.05)
    Body LB_wrap: mass=0.001 mass_center=(-0.098 0.071 0) inertia=(6.85833e-6 6.85833e-6 2.45e-6 0 0 0)
      WrapCylinder Cylinder2: translation=(-0.1151 0.0768 0) quadrant=all radius=0.07 length=0.26
    Body clavicle: mass=0.156 mass_center=(-0.011096 0.0063723 0.054168)
        inertia=(0.00024259 0.00025526 4.442e-5 -1.898e-5 -6.994e-5 5.371e-5) meshes=clavicle.vtp
    Body clavphant: mass=0.0001 mass_center=(0 0 0) inertia=(1 1 1 0 0 0)
    Body scapula: mass=0.70396 mass_center=(-0.054694 -0.035032 -0.043734)
        inertia=(0.0012429 0.0011504 0.0013651 0.0004494 0.00040922 0.0002411) meshes=scapula.vtp
    Body scapphant: mass=0.0001 mass_center=(0 0 0) inertia=(1 1 1 0 0 0)
    Body humphant: mass=0.0001 mass_center=(0 0 0) inertia=(1 1 1 0 0 0)
    Body humphant1: mass=0.0001 mass_center=(0 0 0) inertia=(1 1 1 0 0 0)
    Body humerus: mass=1.99757 mass_center=(0.018064 -0.140141 -0.012746)
        inertia=(0.0122776 0.00255133 0.0125789 -0.00034741 -0.0002325 0.0012293) meshes=humerus.vtp
    Body ulna: mass=1.1053 mass_center=(0.00971783 -0.0959509 0.024286)
        inertia=(0.00541309 0.00115318 0.00494361 0.00031686 -7.615e-5 0.00109169) meshes=ulna.vtp
    Body radius: mass=0.23359 mass_center=(0.0336341 -0.181559 0.0156)
        inertia=(0.00043855 8.859e-5 0.00040258 3.014e-5 -4.24e-6 6.418e-5) meshes=radius.vtp
    Body proximal_row: mass=0.0001 mass_center=(0 0 0) inertia=(1e-5 1e-5 1e-5 0 0 0)
        meshes=(lunate.vtp sdfastSCAPHOIDw.vtp sdfastPISIFORMw.vtp sdfastTRIQUETRALw.vtp)
    Body hand: mass=0.5819 mass_center=(-0.00301314 -0.0424993 -0.00112205)
        inertia=(0.00011 6e-5 0.00015 9e-7 -2e-7 1.2e-5)
        meshes=(sdfast_1seg_hand_fr_c_5mc.vtp sdfast_1seg_hand_fr_c_4mc.vtp sdfast_1seg_hand_fr_c_3mc.vtp sdfast_1seg_hand_fr_c_2mc.vtp sdfast_1seg_hand_fr_c_trapezium.vtp sdfast_1seg_hand_fr_c_trapezoid.vtp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)
    Body clavicle_l: mass=0.156 mass_center=(-0.011096 0.0063723 -0.054168)
        inertia=(0.00024259 0.00025526 4.442e-5 -1.898e-5 -6.994e-5 5.371e-5) meshes=clavicle_mirror.vtp
    Body clavphant_l: mass=0.0001 mass_center=(0 0 0) inertia=(1 1 1 0 0 0)
    Body scapula_l: mass=0.70396 mass_center=(-0.054694 -0.035032 0.043734)
        inertia=(0.0012429 0.0011504 0.0013651 0.0004494 0.00040922 0.0002411) meshes=scapula_mirror.vtp
    Body scapphant_l: mass=0.0001 mass_center=(0 0 0) inertia=(1 1 1 0 0 0)
    Body humphant_l: mass=0.0001 mass_center=(0 0 0) inertia=(1 1 1 0 0 0)
    Body humphant1_l: mass=0.0001 mass_center=(0 0 0) inertia=(1 1 1 0 0 0)
    Body humerus_l: mass=1.99757 mass_center=(0.018064 -0.140141 0.012746)
        inertia=(0.0122776 0.00255133 0.0125789 -0.00034741 -0.0002325 0.0012293) meshes=humerus_mirror.vtp
    Body ulna_l: mass=1.1053 mass_center=(0.00971783 -0.0959509 -0.024286)
        inertia=(0.00541309 0.00115318 0.00494361 0.00031686 -7.615e-5 0.00109169) meshes=ulna_mirror.vtp
    Body radius_l: mass=0.23359 mass_center=(0.0336341 -0.181559 -0.0156)
        inertia=(0.00043855 8.859e-5 0.00040258 3.014e-5 -4.24e-6 6.418e-5) meshes=radius_mirror.vtp
    Body proximal_row_l: mass=0.0001 mass_center=(0 0 0) inertia=(1e-5 1e-5 1e-5 0 0 0)
        meshes=(lunate_mirror.vtp sdfastSCAPHOIDw_mirror.vtp sdfastPISIFORMw_mirror.vtp sdfastTRIQUETRALw_mirror.vtp)
    Body hand_l: mass=0.5819 mass_center=(-0.00301314 -0.0424993 0.00112205)
        inertia=(0.00011 6e-5 0.00015 9e-7 -2e-7 1.2e-5)
        meshes=(sdfast_1seg_hand_fr_c_5mc_mirror.vtp sdfast_1seg_hand_fr_c_4mc_mirror.vtp sdfast_1seg_hand_fr_c_3mc_mirror.vtp sdfast_1seg_hand_fr_c_2mc_mirror.vtp sdfast_1seg_hand_fr_c_trapezium_mirror.vtp sdfast_1seg_hand_fr_c_trapezoid_mirror.vtp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)
  JointSet:
    CustomJoint ground_pelvis: socket_parent_frame=ground_offset socket_child_frame=pelvis_offset
      Coordinate pelvis_tilt: default_value=0 range=(-1.570796 1.570796) clamped=true
      Coordinate pelvis_list: default_value=0 range=(-1.570796 1.570796) clamped=true
      Coordinate pelvis_rotation: default_value=0.1570796 range=(-1.570796 1.570796) clamped=true
      Coordinate pelvis_tx: default_value=0.15 range=(-5 5) clamped=true
      Coordinate pelvis_ty: default_value=0.9999999 range=(-1 2) clamped=true
      Coordinate pelvis_tz: default_value=-0.4 range=(-3 3) clamped=true
      PhysicalOffsetFrame ground_offset: socket_parent=/ground translation=(0 0 0) [meters]
      PhysicalOffsetFrame pelvis_offset: socket_parent=/bodyset/pelvis translation=(0 0 0)
      SpatialTransform:
        TransformAxis rotation1: coordinates=pelvis_tilt axis=(0 0 1) LinearFunction(coefficients=1 0)
        TransformAxis rotation2: coordinates=pelvis_list axis=(1 0 0) LinearFunction(coefficients=1 0)
        TransformAxis rotation3: coordinates=pelvis_rotation axis=(0 1 0) LinearFunction(coefficients=1 0)
        TransformAxis translation1: coordinates=pelvis_tx axis=(1 0 0) LinearFunction(coefficients=1 0)
        TransformAxis translation2: coordinates=pelvis_ty axis=(0 1 0) LinearFunction(coefficients=1 0)
        TransformAxis translation3: coordinates=pelvis_tz axis=(0 0 1) LinearFunction(coefficients=1 0)
    WeldJoint sacrumjnt: socket_parent_frame=pelvis_offset socket_child_frame=sacrum_offset
      PhysicalOffsetFrame pelvis_offset: socket_parent=/bodyset/pelvis translation=(0.01 -0.017 0)
      PhysicalOffsetFrame sacrum_offset: socket_parent=/bodyset/sacrum translation=(0 0 0)
    CustomJoint hip_r: socket_parent_frame=pelvis_offset socket_child_frame=femur_r_offset
      Coordinate hip_flexion_r: default_value=0 range=(-2.094395 2.094395) clamped=true
      Coordinate hip_adduction_r: default_value=-0.06981317 range=(-2.094395 2.094395) clamped=true
      Coordinate hip_rotation_r: default_value=-0.3490658 range=(-2.094395 2.094395) clamped=true
      PhysicalOffsetFrame pelvis_offset: socket_parent=/bodyset/pelvis translation=(-0.0707 -0.0661 0.0835)
      PhysicalOffsetFrame femur_r_offset: socket_parent=/bodyset/femur_r translation=(0 0 0)
      SpatialTransform: axes_held_at_zero=(translation1 translation2 translation3)
        TransformAxis rotation1: coordinates=hip_flexion_r axis=(0 0 1) LinearFunction(coefficients=1 0)
        TransformAxis rotation2: coordinates=hip_adduction_r axis=(1 0 0) LinearFunction(coefficients=1 0)
        TransformAxis rotation3: coordinates=hip_rotation_r axis=(0 1 0) LinearFunction(coefficients=1 0)
    CustomJoint patellofemoral_r: socket_parent_frame=femur_r_offset socket_child_frame=patella_r_offset
      Coordinate knee_angle_r_beta: default_value=1.710422 range=(-99999.9 99999.9) clamped=false
      PhysicalOffsetFrame femur_r_offset: socket_parent=/bodyset/femur_r translation=(0 0 0)
      PhysicalOffsetFrame patella_r_offset: socket_parent=/bodyset/patella_r translation=(0 0 0)
      SpatialTransform: axes_held_at_zero=(rotation2 rotation3 translation3)
        TransformAxis rotation1: coordinates=knee_angle_r_beta axis=(0 0 1)
          SimmSpline: x=(0 0.174533 0.349066 0.523599 0.698132 0.872665 1.0472 1.22173 1.39626 1.5708 1.74533 1.91986 2.0944)
              y=(0.00113686 -0.00629212 -0.105582 -0.253683 -0.414245 -0.579047 -0.747244 -0.91799 -1.09044 -1.26379 -1.43763 -1.61186 -1.78634)
        TransformAxis translation1: coordinates=knee_angle_r_beta axis=(1 0 0)
          SimmSpline: x=(0 0.174533 0.349066 0.523599 0.698132 0.872665 1.0472 1.22173 1.39626 1.5708 1.74533 1.91986 2.0944)
              y=(0.04435 0.040692 0.035581 0.029012 0.021473 0.013523 0.005483 -0.002412 -0.009959 -0.016903 -0.022926 -0.027739 -0.030815)
        TransformAxis translation2: coordinates=knee_angle_r_beta axis=(0 1 0)
          SimmSpline: x=(0 0.174533 0.349066 0.523599 0.698132 0.872665 1.0472 1.22173 1.39626 1.5708 1.74533 1.91986 2.0944)
              y=(-0.418712 -0.426965 -0.43422 -0.440152 -0.444617 -0.447495 -0.448724 -0.448337 -0.446353 -0.442826 -0.438035 -0.432448 -0.426632)
    CustomJoint knee_r: socket_parent_frame=femur_r_offset socket_child_frame=tibia_r_offset
      Coordinate knee_angle_r: default_value=-2.573569e-7 range=(-2.094395 0.1745329) clamped=true
      PhysicalOffsetFrame femur_r_offset: socket_parent=/bodyset/femur_r translation=(0 0 0)
      PhysicalOffsetFrame tibia_r_offset: socket_parent=/bodyset/tibia_r translation=(0 0 0)
      SpatialTransform: axes_held_at_zero=(rotation2 rotation3 translation3)
        TransformAxis rotation1: coordinates=knee_angle_r axis=(0 0 1) LinearFunction(coefficients=1 0)
        TransformAxis translation1: coordinates=knee_angle_r axis=(1 0 0)
          SimmSpline: x=(-2.0944 -1.74533 -1.39626 -1.0472 -0.698132 -0.349066 -0.174533 0.197344 0.337395 0.490178 1.52146 2.0944)
              y=(-0.0032 0.00179 0.00411 0.0041 0.00212 -0.001 -0.0031 -0.005227 -0.005435 -0.005574 -0.005435 -0.00525)
        TransformAxis translation2: coordinates=knee_angle_r axis=(0 1 0)
          SimmSpline: x=(-2.0944 -1.22173 -0.523599 -0.349066 -0.174533 0.159149 2.0944)
              y=(-0.4226 -0.4082 -0.399 -0.3976 -0.3966 -0.395264 -0.396)
    CustomJoint ankle_r: socket_parent_frame=tibia_r_offset socket_child_frame=talus_r_offset
      Coordinate ankle_angle_r: default_value=-0.2094395 range=(-1.570796 1.570796) clamped=true
      PhysicalOffsetFrame tibia_r_offset: socket_parent=/bodyset/tibia_r translation=(0 -0.43 0)
      PhysicalOffsetFrame talus_r_offset: socket_parent=/bodyset/talus_r translation=(0 0 0)
      SpatialTransform: axes_held_at_zero=(rotation2 rotation3 translation1 translation2 translation3)
        TransformAxis rotation1: coordinates=ankle_angle_r axis=(-0.1050135 -0.1740224 0.9791263)
            LinearFunction(coefficients=1 0)
    CustomJoint subtalar_r: socket_parent_frame=talus_r_offset socket_child_frame=calcn_r_offset
      Coordinate subtalar_angle_r: default_value=0 range=(-1.570796 1.570796) clamped=true locked=true
      PhysicalOffsetFrame talus_r_offset: socket_parent=/bodyset/talus_r translation=(-0.04877 -0.04195 0.00792)
      PhysicalOffsetFrame calcn_r_offset: socket_parent=/bodyset/calcn_r translation=(0 0 0)
      SpatialTransform: axes_held_at_zero=(rotation2 rotation3 translation1 translation2 translation3)
        TransformAxis rotation1: coordinates=subtalar_angle_r axis=(0.7871796 0.6047475 -0.1209495)
            LinearFunction(coefficients=1 0)
    CustomJoint mtp_r: socket_parent_frame=calcn_r_offset socket_child_frame=toes_r_offset
      Coordinate mtp_angle_r: default_value=0 range=(-1.570796 1.570796) clamped=true locked=true
      PhysicalOffsetFrame calcn_r_offset: socket_parent=/bodyset/calcn_r translation=(0.1788 -0.002 0.00108)
      PhysicalOffsetFrame toes_r_offset: socket_parent=/bodyset/toes_r translation=(0 0 0)
      SpatialTransform: axes_held_at_zero=(rotation2 rotation3 translation1 translation2 translation3)
        TransformAxis rotation1: coordinates=mtp_angle_r axis=(-0.5809544 0 0.8139361) LinearFunction(coefficients=1 0)
    CustomJoint hip_l: socket_parent_frame=pelvis_offset socket_child_frame=femur_l_offset
      Coordinate hip_flexion_l: default_value=0 range=(-2.094395 2.094395) clamped=true
      Coordinate hip_adduction_l: default_value=-0.1047198 range=(-2.094395 2.094395) clamped=true
      Coordinate hip_rotation_l: default_value=-0.06981317 range=(-2.094395 2.094395) clamped=true
      PhysicalOffsetFrame pelvis_offset: socket_parent=/bodyset/pelvis translation=(-0.0707 -0.0661 -0.0835)
      PhysicalOffsetFrame femur_l_offset: socket_parent=/bodyset/femur_l translation=(0 0 0)
      SpatialTransform: axes_held_at_zero=(translation1 translation2 translation3)
        TransformAxis rotation1: coordinates=hip_flexion_l axis=(0 0 1) LinearFunction(coefficients=1 0)
        TransformAxis rotation2: coordinates=hip_adduction_l axis=(-1 0 0) LinearFunction(coefficients=1 0)
        TransformAxis rotation3: coordinates=hip_rotation_l axis=(0 -1 0) LinearFunction(coefficients=1 0)
    CustomJoint patellofemoral_l: socket_parent_frame=femur_l_offset socket_child_frame=patella_l_offset
      Coordinate knee_angle_l_beta: default_value=1.716234 range=(-99999.9 99999.9) clamped=false
      PhysicalOffsetFrame femur_l_offset: socket_parent=/bodyset/femur_l translation=(0 0 0)
      PhysicalOffsetFrame patella_l_offset: socket_parent=/bodyset/patella_l translation=(0 0 0)
      SpatialTransform: axes_held_at_zero=(rotation2 rotation3 translation3)
        TransformAxis rotation1: coordinates=knee_angle_l_beta axis=(0 0 1)
          SimmSpline: x=(0 0.174533 0.349066 0.523599 0.698132 0.872665 1.0472 1.22173 1.39626 1.5708 1.74533 1.91986 2.0944)
              y=(0.00113686 -0.00629212 -0.105582 -0.253683 -0.414245 -0.579047 -0.747244 -0.91799 -1.09044 -1.26379 -1.43763 -1.61186 -1.78634)
        TransformAxis translation1: coordinates=knee_angle_l_beta axis=(1 0 0)
          SimmSpline: x=(0 0.174533 0.349066 0.523599 0.698132 0.872665 1.0472 1.22173 1.39626 1.5708 1.74533 1.91986 2.0944)
              y=(0.04435 0.040692 0.035581 0.029012 0.021473 0.013523 0.005483 -0.002412 -0.009959 -0.016903 -0.022926 -0.027739 -0.030815)
        TransformAxis translation2: coordinates=knee_angle_l_beta axis=(0 1 0)
          SimmSpline: x=(0 0.174533 0.349066 0.523599 0.698132 0.872665 1.0472 1.22173 1.39626 1.5708 1.74533 1.91986 2.0944)
              y=(-0.418712 -0.426965 -0.43422 -0.440152 -0.444617 -0.447495 -0.448724 -0.448337 -0.446353 -0.442826 -0.438035 -0.432448 -0.426632)
    CustomJoint knee_l: socket_parent_frame=femur_l_offset socket_child_frame=tibia_l_offset
      Coordinate knee_angle_l: default_value=-2.573569e-7 range=(-2.094395 0.1745329) clamped=true
      PhysicalOffsetFrame femur_l_offset: socket_parent=/bodyset/femur_l translation=(0 0 0)
      PhysicalOffsetFrame tibia_l_offset: socket_parent=/bodyset/tibia_l translation=(0 0 0)
      SpatialTransform: axes_held_at_zero=(rotation2 rotation3 translation3)
        TransformAxis rotation1: coordinates=knee_angle_l axis=(0 0 1) LinearFunction(coefficients=1 0)
        TransformAxis translation1: coordinates=knee_angle_l axis=(1 0 0)
          SimmSpline: x=(-2.0944 -1.74533 -1.39626 -1.0472 -0.698132 -0.349066 -0.174533 0.197344 0.337395 0.490178 1.52146 2.0944)
              y=(-0.0032 0.00179 0.00411 0.0041 0.00212 -0.001 -0.0031 -0.005227 -0.005435 -0.005574 -0.005435 -0.00525)
        TransformAxis translation2: coordinates=knee_angle_l axis=(0 1 0)
          SimmSpline: x=(-2.0944 -1.22173 -0.523599 -0.349066 -0.174533 0.159149 2.0944)
              y=(-0.4226 -0.4082 -0.399 -0.3976 -0.3966 -0.395264 -0.396)
    CustomJoint ankle_l: socket_parent_frame=tibia_l_offset socket_child_frame=talus_l_offset
      Coordinate ankle_angle_l: default_value=-0.1745329 range=(-1.047198 1.047198) clamped=true
      PhysicalOffsetFrame tibia_l_offset: socket_parent=/bodyset/tibia_l translation=(0 -0.43 0)
      PhysicalOffsetFrame talus_l_offset: socket_parent=/bodyset/talus_l translation=(0 0 0)
      SpatialTransform: axes_held_at_zero=(rotation2 rotation3 translation1 translation2 translation3)
        TransformAxis rotation1: coordinates=ankle_angle_l axis=(0.1050135 0.1740224 0.9791263)
            LinearFunction(coefficients=1 0)
    CustomJoint subtalar_l: socket_parent_frame=talus_l_offset socket_child_frame=calcn_l_offset
      Coordinate subtalar_angle_l: default_value=0 range=(-1.570796 1.570796) clamped=true locked=true
      PhysicalOffsetFrame talus_l_offset: socket_parent=/bodyset/talus_l translation=(-0.04877 -0.04195 -0.00792)
      PhysicalOffsetFrame calcn_l_offset: socket_parent=/bodyset/calcn_l translation=(0 0 0)
      SpatialTransform: axes_held_at_zero=(rotation2 rotation3 translation1 translation2 translation3)
        TransformAxis rotation1: coordinates=subtalar_angle_l axis=(-0.7871796 -0.6047475 -0.1209495)
            LinearFunction(coefficients=1 0)
    CustomJoint mtp_l: socket_parent_frame=calcn_l_offset socket_child_frame=toes_l_offset
      Coordinate mtp_angle_l: default_value=0 range=(-1.047198 1.047198) clamped=true locked=true
      PhysicalOffsetFrame calcn_l_offset: socket_parent=/bodyset/calcn_l translation=(0.1788 -0.002 -0.00108)
      PhysicalOffsetFrame toes_l_offset: socket_parent=/bodyset/toes_l translation=(0 0 0)
      SpatialTransform: axes_held_at_zero=(rotation2 rotation3 translation1 translation2 translation3)
        TransformAxis rotation1: coordinates=mtp_angle_l axis=(0.5809544 0 0.8139361) LinearFunction(coefficients=1 0)
    CustomJoint L5_S1_IVDjnt: socket_parent_frame=sacrum_offset socket_child_frame=lumbar5_offset
      Coordinate flex_extension: default_value=-0.2167305 range=(-1.22173 0.4537856) clamped=true
      Coordinate lat_bending: default_value=0.04366768 range=(-0.4363323 0.4363323) clamped=true
      Coordinate axial_rotation: default_value=-0.5551297 range=(-0.9791297 0.9791297) clamped=true
      PhysicalOffsetFrame sacrum_offset: socket_parent=/bodyset/sacrum translation=(-0.098 0.071 0)
      PhysicalOffsetFrame lumbar5_offset: socket_parent=/bodyset/lumbar5 translation=(0 0 0)
      SpatialTransform: axes_held_at_zero=(translation1 translation2 translation3)
        TransformAxis rotation1: coordinates=flex_extension axis=(0 0 1) LinearFunction(coefficients=0.0889273 0)
        TransformAxis rotation2: coordinates=lat_bending axis=(1 0 0)
            PiecewiseLinearFunction(x=-1.01875 1.01875, y=-0.138056 0.138056)
        TransformAxis rotation3: coordinates=axial_rotation axis=(0 1 0)
          SimmSpline: x=(-0.97913 0 0.97913) y=(-0.0296706 0 0.0279253)
    CustomJoint L4_L5_IVDjnt: socket_parent_frame=lumbar5_offset socket_child_frame=lumbar4_offset
      Coordinate L4_L5_IVDjnt_r3: default_value=-0.03120919 range=(-99999.9 99999.9) clamped=false
      Coordinate L4_L5_IVD_bendjnt_r1: default_value=0.00790759 range=(-99999.9 99999.9) clamped=false
      Coordinate L4_L5_IVD_rotjnt_r2: default_value=-0.02343884 range=(-99999.9 99999.9) clamped=false
      PhysicalOffsetFrame lumbar5_offset: socket_parent=/bodyset/lumbar5 translation=(0.01 0.0296 0)
      PhysicalOffsetFrame lumbar4_offset: socket_parent=/bodyset/lumbar4 translation=(0.001 -0.0025 0)
      SpatialTransform: axes_held_at_zero=(translation1 translation2 translation3)
        TransformAxis rotation1: coordinates=L4_L5_IVDjnt_r3 axis=(0 0 1) LinearFunction(coefficients=1 0)
        TransformAxis rotation2: coordinates=L4_L5_IVD_bendjnt_r1 axis=(1 0 0) LinearFunction(coefficients=1 0)
        TransformAxis rotation3: coordinates=L4_L5_IVD_rotjnt_r2 axis=(0 1 0) LinearFunction(coefficients=1 0)
    CustomJoint L3_L4_IVDjnt: socket_parent_frame=lumbar4_offset socket_child_frame=lumbar3_offset
      Coordinate L3_L4_IVDjnt_r3: default_value=-0.04437448 range=(-99999.9 99999.9) clamped=false
      Coordinate L3_L4_IVD_bendjnt_r1: default_value=0.01071304 range=(-99999.9 99999.9) clamped=false
      Coordinate L3_L4_IVD_rotjnt_r2: default_value=-0.02343884 range=(-99999.9 99999.9) clamped=false
      PhysicalOffsetFrame lumbar4_offset: socket_parent=/bodyset/lumbar4 translation=(0 0.032 0)
      PhysicalOffsetFrame lumbar3_offset: socket_parent=/bodyset/lumbar3 translation=(-0.0006 -0.0012 0)
      SpatialTransform: axes_held_at_zero=(translation1 translation2 translation3)
        TransformAxis rotation1: coordinates=L3_L4_IVDjnt_r3 axis=(0 0 1) LinearFunction(coefficients=1 0)
        TransformAxis rotation2: coordinates=L3_L4_IVD_bendjnt_r1 axis=(1 0 0) LinearFunction(coefficients=1 0)
        TransformAxis rotation3: coordinates=L3_L4_IVD_rotjnt_r2 axis=(0 1 0) LinearFunction(coefficients=1 0)
    CustomJoint L2_L3_IVD_jnt: socket_parent_frame=lumbar3_offset socket_child_frame=lumbar2_offset
      Coordinate L2_L3_IVDjnt_r3: default_value=-0.05344964 range=(-99999.9 99999.9) clamped=false
      Coordinate L2_L3_IVD_bendjnt_r1: default_value=0.01092251 range=(-99999.9 99999.9) clamped=false
      Coordinate L2_L3_IVD_rotjnt_r2: default_value=-0.0185043 range=(-99999.9 99999.9) clamped=false
      PhysicalOffsetFrame lumbar3_offset: socket_parent=/bodyset/lumbar3 translation=(-0.008 0.0312 0)
      PhysicalOffsetFrame lumbar2_offset: socket_parent=/bodyset/lumbar2 translation=(-0.0013 -0.0039 0)
      SpatialTransform: axes_held_at_zero=(translation1 translation2 translation3)
        TransformAxis rotation1: coordinates=L2_L3_IVDjnt_r3 axis=(0 0 1) LinearFunction(coefficients=1 0)
        TransformAxis rotation2: coordinates=L2_L3_IVD_bendjnt_r1 axis=(1 0 0) LinearFunction(coefficients=1 0)
        TransformAxis rotation3: coordinates=L2_L3_IVD_rotjnt_r2 axis=(0 1 0) LinearFunction(coefficients=1 0)
    CustomJoint L1_L2_IVD_jnt: socket_parent_frame=lumbar2_offset socket_child_frame=lumbar1_offset
      Coordinate L1_L2_IVDjnt_r3: default_value=-0.06375821 range=(-99999.9 99999.9) clamped=false
      Coordinate L1_L2_IVD_bendjnt_r1: default_value=0.008206867 range=(-99999.9 99999.9) clamped=false
      Coordinate L1_L2_IVD_rotjnt_r2: default_value=-0.0160371 range=(-99999.9 99999.9) clamped=false
      PhysicalOffsetFrame lumbar2_offset: socket_parent=/bodyset/lumbar2 translation=(-0.01 0.025 0)
      PhysicalOffsetFrame lumbar1_offset: socket_parent=/bodyset/lumbar1 translation=(0.0014 -0.0038 0)
      SpatialTransform: axes_held_at_zero=(translation1 translation2 translation3)
        TransformAxis rotation1: coordinates=L1_L2_IVDjnt_r3 axis=(0 0 1) LinearFunction(coefficients=0.85 0)
        TransformAxis rotation2: coordinates=L1_L2_IVD_bendjnt_r1 axis=(1 0 0) LinearFunction(coefficients=1 0)
        TransformAxis rotation3: coordinates=L1_L2_IVD_rotjnt_r2 axis=(0 1 0) LinearFunction(coefficients=1 0)
    CustomJoint Torsojnt: socket_parent_frame=lumbar1_offset socket_child_frame=torso_offset
      Coordinate Torso_Rot: default_value=-0.1141594 range=(-1.1 1.1) clamped=true
      PhysicalOffsetFrame lumbar1_offset: socket_parent=/bodyset/lumbar1 translation=(0.0025 -0.09 0)
      PhysicalOffsetFrame torso_offset: socket_parent=/bodyset/torso translation=(0 0 0)
      SpatialTransform: axes_held_at_zero=(rotation2 rotation3 translation1 translation2 translation3)
        TransformAxis rotation1: coordinates=Torso_Rot axis=(0 1 0) LinearFunction(coefficients=1 0)
    CustomJoint Abdjnt: socket_parent_frame=sacrum_offset socket_child_frame=Abdomen_offset
      Coordinate Abs_r3: default_value=-0.1393268 range=(-1.7 1.7) clamped=false
      Coordinate Abs_t1: default_value=0 range=(-99999.9 99999.9) clamped=false locked=true
      Coordinate Abs_t2: default_value=0 range=(-99999.9 99999.9) clamped=false locked=true
      PhysicalOffsetFrame sacrum_offset: socket_parent=/bodyset/sacrum translation=(-0.098 0.071 0)
      PhysicalOffsetFrame Abdomen_offset: socket_parent=/bodyset/Abdomen translation=(-0.09 -0.09 0)
      SpatialTransform: axes_held_at_zero=(rotation2 rotation3 translation3)
        TransformAxis rotation1: coordinates=Abs_r3 axis=(0 0 1) LinearFunction(coefficients=1 0)
        TransformAxis translation1: coordinates=Abs_t1 axis=(1 0 0) LinearFunction(coefficients=1 0)
        TransformAxis translation2: coordinates=Abs_t2 axis=(0 1 0) LinearFunction(coefficients=1 0)
    CustomJoint LB_wrapjnt: socket_parent_frame=sacrum_offset socket_child_frame=LB_wrap_offset
      Coordinate LB_wrapjnt_r3: default_value=-0.1300383 range=(-99999.9 99999.9) clamped=false
      Coordinate LB_wrapjnt_t1: default_value=-0.007164076 range=(-99999.9 99999.9) clamped=false
      Coordinate LB_wrapjnt_t2: default_value=-0.002388025 range=(-99999.9 99999.9) clamped=false
      PhysicalOffsetFrame sacrum_offset: socket_parent=/bodyset/sacrum translation=(-0.098 0.071 0)
      PhysicalOffsetFrame LB_wrap_offset: socket_parent=/bodyset/LB_wrap translation=(0 0 0)
      SpatialTransform: axes_held_at_zero=(rotation2 rotation3 translation3)
        TransformAxis rotation1: coordinates=LB_wrapjnt_r3 axis=(0 0 1) LinearFunction(coefficients=1 0)
        TransformAxis translation1: coordinates=LB_wrapjnt_t1 axis=(1 0 0) LinearFunction(coefficients=1 0)
        TransformAxis translation2: coordinates=LB_wrapjnt_t2 axis=(0 1 0) LinearFunction(coefficients=1 0)
    CustomJoint sternoclavicular: socket_parent_frame=torso_offset socket_child_frame=clavicle_offset
      Coordinate sternoclavicular_r2: default_value=-0.1393823 range=(-99999.9 99999.9) clamped=false
      Coordinate sternoclavicular_r3: default_value=0.05903577 range=(-99999.9 99999.9) clamped=false
      PhysicalOffsetFrame torso_offset: socket_parent=/bodyset/torso translation=(0.036325 0.37693 0.025465)
      PhysicalOffsetFrame clavicle_offset: socket_parent=/bodyset/clavicle translation=(0 0 0)
      SpatialTransform: axes_held_at_zero=(rotation3 translation1 translation2 translation3)
        TransformAxis rotation1: coordinates=sternoclavicular_r2 axis=(0.0153 0.9892987 -0.1451)
            LinearFunction(coefficients=1 0)
        TransformAxis rotation2: coordinates=sternoclavicular_r3 axis=(-0.9944725 0 -0.104997)
            LinearFunction(coefficients=1 0)
    CustomJoint unrotscap: socket_parent_frame=clavicle_offset socket_child_frame=clavphant_offset
      Coordinate unrotscap_r3: default_value=-0.05903577 range=(-99999.9 99999.9) clamped=false
      Coordinate unrotscap_r2: default_value=0.1393823 range=(-99999.9 99999.9) clamped=false
      PhysicalOffsetFrame clavicle_offset: socket_parent=/bodyset/clavicle translation=(-0.01433 0.02007 0.135535)
      PhysicalOffsetFrame clavphant_offset: socket_parent=/bodyset/clavphant translation=(0 0 0)
      SpatialTransform: axes_held_at_zero=(rotation3 translation1 translation2 translation3)
        TransformAxis rotation1: coordinates=unrotscap_r3 axis=(-0.9944725 0 -0.104997)
            LinearFunction(coefficients=1 0)
        TransformAxis rotation2: coordinates=unrotscap_r2 axis=(0.0153 0.9892987 -0.1451)
            LinearFunction(coefficients=1 0)
    CustomJoint acromioclavicular: socket_parent_frame=clavphant_offset socket_child_frame=scapula_offset
      Coordinate acromioclavicular_r2: default_value=-0.02822208 range=(-99999.9 99999.9) clamped=false
      Coordinate acromioclavicular_r3: default_value=0.2280809 range=(-99999.9 99999.9) clamped=false
      Coordinate acromioclavicular_r1: default_value=0.1025208 range=(-99999.9 99999.9) clamped=false
      PhysicalOffsetFrame clavphant_offset: socket_parent=/bodyset/clavphant translation=(0 0 0)
      PhysicalOffsetFrame scapula_offset: socket_parent=/bodyset/scapula translation=(0 0 0)
      SpatialTransform: axes_held_at_zero=(translation1 translation2 translation3)
        TransformAxis rotation1: coordinates=acromioclavicular_r2 axis=(0.1570949 0.9472686 -0.2792909)
            LinearFunction(coefficients=1 0)
        TransformAxis rotation2: coordinates=acromioclavicular_r3 axis=(-0.754084 0.297594 0.585487)
            LinearFunction(coefficients=1 0)
        TransformAxis rotation3: coordinates=acromioclavicular_r1 axis=(0.6376998 0.1186 0.7610998)
            LinearFunction(coefficients=1 0)
    CustomJoint unrothum: socket_parent_frame=scapula_offset socket_child_frame=scapphant_offset
      Coordinate unrothum_r1: default_value=-0.1025208 range=(-99999.9 99999.9) clamped=false
      Coordinate unrothum_r3: default_value=-0.2280809 range=(-99999.9 99999.9) clamped=false
      Coordinate unrothum_r2: default_value=0.02822208 range=(-99999.9 99999.9) clamped=false
      PhysicalOffsetFrame scapula_offset: socket_parent=/bodyset/scapula translation=(-0.00955 -0.034 0.009)
      PhysicalOffsetFrame scapphant_offset: socket_parent=/bodyset/scapphant translation=(0 0 0)
      SpatialTransform: axes_held_at_zero=(translation1 translation2 translation3)
        TransformAxis rotation1: coordinates=unrothum_r1 axis=(0.6376998 0.1186 0.7610998)
            LinearFunction(coefficients=1 0)
        TransformAxis rotation2: coordinates=unrothum_r3 axis=(-0.754084 0.297594 0.585487)
            LinearFunction(coefficients=1 0)
        TransformAxis rotation3: coordinates=unrothum_r2 axis=(0.1570949 0.9472686 -0.2792909)
            LinearFunction(coefficients=1 0)
    CustomJoint shoulder0: socket_parent_frame=scapphant_offset socket_child_frame=humphant_offset
      Coordinate elv_angle: default_value=-0.08726645 range=(-1.658063 2.268928) clamped=true
      PhysicalOffsetFrame scapphant_offset: socket_parent=/bodyset/scapphant translation=(0 0 0)
      PhysicalOffsetFrame humphant_offset: socket_parent=/bodyset/humphant translation=(0 0 0)
      SpatialTransform: axes_held_at_zero=(rotation2 rotation3 translation1 translation2 translation3)
        TransformAxis rotation1: coordinates=elv_angle axis=(0.0048 0.9990892 0.04240001)
            LinearFunction(coefficients=1 0)
    CustomJoint shoulder1: socket_parent_frame=humphant_offset socket_child_frame=humphant1_offset
      Coordinate shoulder_elv: default_value=0.5759587 range=(0 3.141593) clamped=true
      Coordinate shoulder1_r2: default_value=0.08726645 range=(-99999.9 99999.9) clamped=false
      PhysicalOffsetFrame humphant_offset: socket_parent=/bodyset/humphant translation=(0 0 0)
      PhysicalOffsetFrame humphant1_offset: socket_parent=/bodyset/humphant1 translation=(0 0 0)
      SpatialTransform: axes_held_at_zero=(rotation3 translation1 translation2 translation3)
        TransformAxis rotation1: coordinates=shoulder_elv axis=(-0.9982614 0.0023 0.05889802)
            LinearFunction(coefficients=1 0)
        TransformAxis rotation2: coordinates=shoulder1_r2 axis=(0.0048 0.9990892 0.04240001)
            LinearFunction(coefficients=1 0)
    CustomJoint shoulder2: socket_parent_frame=humphant1_offset socket_child_frame=humerus_offset
      Coordinate shoulder_rot: default_value=-0.2268928 range=(-1.570796 2.094395) clamped=true
      PhysicalOffsetFrame humphant1_offset: socket_parent=/bodyset/humphant1 translation=(0 0 0)
      PhysicalOffsetFrame humerus_offset: socket_parent=/bodyset/humerus translation=(0 0 0)
      SpatialTransform: axes_held_at_zero=(rotation2 rotation3 translation1 translation2 translation3)
        TransformAxis rotation1: coordinates=shoulder_rot axis=(0.0048 0.9990892 0.04240001)
            LinearFunction(coefficients=1 0)
    CustomJoint elbow: socket_parent_frame=humerus_offset socket_child_frame=ulna_offset
      Coordinate elbow_flexion: default_value=0.5294107 range=(0 2.268928) clamped=true
      PhysicalOffsetFrame humerus_offset: socket_parent=/bodyset/humerus translation=(0.0061 -0.2904 -0.0123)
      PhysicalOffsetFrame ulna_offset: socket_parent=/bodyset/ulna translation=(0 0 0)
      SpatialTransform: axes_held_at_zero=(rotation2 rotation3 translation1 translation2 translation3)
        TransformAxis rotation1: coordinates=elbow_flexion axis=(0.04940001 0.03660001 0.9981083)
            LinearFunction(coefficients=1 0)
    CustomJoint radioulnar: socket_parent_frame=ulna_offset socket_child_frame=radius_offset
      Coordinate pro_sup: default_value=0.9424777 range=(-1.570796 1.570796) clamped=true
      PhysicalOffsetFrame ulna_offset: socket_parent=/bodyset/ulna translation=(0.0004 -0.011503 0.019999)
      PhysicalOffsetFrame radius_offset: socket_parent=/bodyset/radius translation=(0 0 0)
      SpatialTransform: axes_held_at_zero=(rotation2 rotation3 translation1 translation2 translation3)
        TransformAxis rotation1: coordinates=pro_sup axis=(-0.01716099 0.9926656 -0.119668)
            LinearFunction(coefficients=1 0)
    CustomJoint radiocarpal: socket_parent_frame=radius_offset socket_child_frame=proximal_row_offset
      Coordinate deviation: default_value=1.249982e-7 range=(-0.1745329 0.4363323) clamped=true
      Coordinate flexion: default_value=0.7322695 range=(-1.22173 1.22173) clamped=true
      PhysicalOffsetFrame radius_offset: socket_parent=/bodyset/radius translation=(0.018 -0.242 0.025)
      PhysicalOffsetFrame proximal_row_offset: socket_parent=/bodyset/proximal_row translation=(0 0 0)
      SpatialTransform: axes_held_at_zero=(rotation2 translation1 translation2 translation3)
        TransformAxis rotation1: coordinates=deviation axis=(-0.819064 -0.135611 -0.557444)
          SimmSpline: x=(-0.174533 0 0.436332) y=(-0.174533 0 0.436332)
        TransformAxis rotation3: coordinates=flexion axis=(0.9564267 -0.2522069 0.147104)
          SimmSpline: x=(-1.5708 1.5708) y=(-0.785398 0.785398)
    CustomJoint wrist_hand: socket_parent_frame=proximal_row_offset socket_child_frame=hand_offset
      Coordinate wrist_hand_r1: default_value=1.696402e-7 range=(-99999.9 99999.9) clamped=false
      Coordinate wrist_hand_r3: default_value=0.3661347 range=(-99999.9 99999.9) clamped=false
      PhysicalOffsetFrame proximal_row_offset: socket_parent=/bodyset/proximal_row
          translation=(0.003992 -0.015054 0.002327)
      PhysicalOffsetFrame hand_offset: socket_parent=/bodyset/hand translation=(0 0 0)
      SpatialTransform: axes_held_at_zero=(rotation3 translation1 translation2 translation3)
        TransformAxis rotation1: coordinates=wrist_hand_r1 axis=(0.8991357 -0.3490529 -0.2640399)
            LinearFunction(coefficients=1 0)
        TransformAxis rotation2: coordinates=wrist_hand_r3 axis=(0.9971185 0.01069999 -0.07510096)
            LinearFunction(coefficients=1 0)
    CustomJoint sternoclavicular_l: socket_parent_frame=torso_offset socket_child_frame=clavicle_l_offset
      Coordinate sternoclavicular_r2_l: default_value=-0.08869783 range=(-99999.9 99999.9) clamped=false
      Coordinate sternoclavicular_r3_l: default_value=0.03756822 range=(-99999.9 99999.9) clamped=false
      PhysicalOffsetFrame torso_offset: socket_parent=/bodyset/torso translation=(0.036325 0.37693 -0.025465)
      PhysicalOffsetFrame clavicle_l_offset: socket_parent=/bodyset/clavicle_l translation=(0 0 0)
      SpatialTransform: axes_held_at_zero=(rotation3 translation1 translation2 translation3)
        TransformAxis rotation1: coordinates=sternoclavicular_r2_l axis=(-0.0153 -0.9892987 -0.1451)
            LinearFunction(coefficients=1 0)
        TransformAxis rotation2: coordinates=sternoclavicular_r3_l axis=(0.9944725 0 -0.104997)
            LinearFunction(coefficients=1 0)
    CustomJoint unrotscap_l: socket_parent_frame=clavicle_l_offset socket_child_frame=clavphant_l_offset
      Coordinate unrotscap_r3_l: default_value=-0.03756822 range=(-99999.9 99999.9) clamped=false
      Coordinate unrotscap_r2_l: default_value=0.08869783 range=(-99999.9 99999.9) clamped=false
      PhysicalOffsetFrame clavicle_l_offset: socket_parent=/bodyset/clavicle_l translation=(-0.01433 0.02007 -0.135535)
      PhysicalOffsetFrame clavphant_l_offset: socket_parent=/bodyset/clavphant_l translation=(0 0 0)
      SpatialTransform: axes_held_at_zero=(rotation3 translation1 translation2 translation3)
        TransformAxis rotation1: coordinates=unrotscap_r3_l axis=(0.9944725 0 -0.104997)
            LinearFunction(coefficients=1 0)
        TransformAxis rotation2: coordinates=unrotscap_r2_l axis=(-0.0153 -0.9892987 -0.1451)
            LinearFunction(coefficients=1 0)
    CustomJoint acromioclavicular_l: socket_parent_frame=clavphant_l_offset socket_child_frame=scapula_l_offset
      Coordinate acromioclavicular_r2_l: default_value=-0.01795951 range=(-99999.9 99999.9) clamped=false
      Coordinate acromioclavicular_r3_l: default_value=0.1451424 range=(-99999.9 99999.9) clamped=false
      Coordinate acromioclavicular_r1_l: default_value=0.06524052 range=(-99999.9 99999.9) clamped=false
      PhysicalOffsetFrame clavphant_l_offset: socket_parent=/bodyset/clavphant_l translation=(0 0 0)
      PhysicalOffsetFrame scapula_l_offset: socket_parent=/bodyset/scapula_l translation=(0 0 0)
      SpatialTransform: axes_held_at_zero=(translation1 translation2 translation3)
        TransformAxis rotation1: coordinates=acromioclavicular_r2_l axis=(-0.1570949 -0.9472686 -0.2792909)
            LinearFunction(coefficients=1 0)
        TransformAxis rotation2: coordinates=acromioclavicular_r3_l axis=(0.754084 -0.297594 0.585487)
            LinearFunction(coefficients=1 0)
        TransformAxis rotation3: coordinates=acromioclavicular_r1_l axis=(-0.6376998 -0.1186 0.7610998)
            LinearFunction(coefficients=1 0)
    CustomJoint unrothum_l: socket_parent_frame=scapula_l_offset socket_child_frame=scapphant_l_offset
      Coordinate unrothum_r1_l: default_value=-0.06524052 range=(-99999.9 99999.9) clamped=false
      Coordinate unrothum_r3_l: default_value=-0.1451424 range=(-99999.9 99999.9) clamped=false
      Coordinate unrothum_r2_l: default_value=0.01795951 range=(-99999.9 99999.9) clamped=false
      PhysicalOffsetFrame scapula_l_offset: socket_parent=/bodyset/scapula_l translation=(-0.00955 -0.034 -0.009)
      PhysicalOffsetFrame scapphant_l_offset: socket_parent=/bodyset/scapphant_l translation=(0 0 0)
      SpatialTransform: axes_held_at_zero=(translation1 translation2 translation3)
        TransformAxis rotation1: coordinates=unrothum_r1_l axis=(-0.6376998 -0.1186 0.7610998)
            LinearFunction(coefficients=1 0)
        TransformAxis rotation2: coordinates=unrothum_r3_l axis=(0.754084 -0.297594 0.585487)
            LinearFunction(coefficients=1 0)
        TransformAxis rotation3: coordinates=unrothum_r2_l axis=(-0.1570949 -0.9472686 -0.2792909)
            LinearFunction(coefficients=1 0)
    CustomJoint shoulder0_l: socket_parent_frame=scapphant_l_offset socket_child_frame=humphant_l_offset
      Coordinate elv_angle_l: default_value=-0.2181661 range=(-1.658063 2.268928) clamped=true
      PhysicalOffsetFrame scapphant_l_offset: socket_parent=/bodyset/scapphant_l translation=(0 0 0)
      PhysicalOffsetFrame humphant_l_offset: socket_parent=/bodyset/humphant_l translation=(0 0 0)
      SpatialTransform: axes_held_at_zero=(rotation2 rotation3 translation1 translation2 translation3)
        TransformAxis rotation1: coordinates=elv_angle_l axis=(-0.0048 -0.9990892 0.04240001)
            LinearFunction(coefficients=1 0)
    CustomJoint shoulder1_l: socket_parent_frame=humphant_l_offset socket_child_frame=humphant1_l_offset
      Coordinate shoulder_elv_l: default_value=0.3665192 range=(0 3.141593) clamped=true
      Coordinate shoulder1_r2_l: default_value=0.2181661 range=(-99999.9 99999.9) clamped=false
      PhysicalOffsetFrame humphant_l_offset: socket_parent=/bodyset/humphant_l translation=(0 0 0)
      PhysicalOffsetFrame humphant1_l_offset: socket_parent=/bodyset/humphant1_l translation=(0 0 0)
      SpatialTransform: axes_held_at_zero=(rotation3 translation1 translation2 translation3)
        TransformAxis rotation1: coordinates=shoulder_elv_l axis=(0.9982614 -0.0023 0.05889802)
            LinearFunction(coefficients=1 0)
        TransformAxis rotation2: coordinates=shoulder1_r2_l axis=(-0.0048 -0.9990892 0.04240001)
            LinearFunction(coefficients=1 0)
    CustomJoint shoulder2_l: socket_parent_frame=humphant1_l_offset socket_child_frame=humerus_l_offset
      Coordinate shoulder_rot_l: default_value=-0.5934119 range=(-1.570796 2.094395) clamped=true
      PhysicalOffsetFrame humphant1_l_offset: socket_parent=/bodyset/humphant1_l translation=(0 0 0)
      PhysicalOffsetFrame humerus_l_offset: socket_parent=/bodyset/humerus_l translation=(0 0 0)
      SpatialTransform: axes_held_at_zero=(rotation2 rotation3 translation1 translation2 translation3)
        TransformAxis rotation1: coordinates=shoulder_rot_l axis=(-0.0048 -0.9990892 0.04240001)
            LinearFunction(coefficients=1 0)
    CustomJoint elbow_l: socket_parent_frame=humerus_l_offset socket_child_frame=ulna_l_offset
      Coordinate elbow_flexion_l: default_value=0.2268928 range=(0 2.268928) clamped=true
      PhysicalOffsetFrame humerus_l_offset: socket_parent=/bodyset/humerus_l translation=(0.0061 -0.2904 0.0123)
      PhysicalOffsetFrame ulna_l_offset: socket_parent=/bodyset/ulna_l translation=(0 0 0)
      SpatialTransform: axes_held_at_zero=(rotation2 rotation3 translation1 translation2 translation3)
        TransformAxis rotation1: coordinates=elbow_flexion_l axis=(-0.04940001 -0.03660001 0.9981083)
            LinearFunction(coefficients=1 0)
    CustomJoint radioulnar_l: socket_parent_frame=ulna_l_offset socket_child_frame=radius_l_offset
      Coordinate pro_sup_l: default_value=1.099557 range=(-1.570796 1.570796) clamped=true
      PhysicalOffsetFrame ulna_l_offset: socket_parent=/bodyset/ulna_l translation=(0.0004 -0.011503 -0.019999)
      PhysicalOffsetFrame radius_l_offset: socket_parent=/bodyset/radius_l translation=(0 0 0)
      SpatialTransform: axes_held_at_zero=(rotation2 rotation3 translation1 translation2 translation3)
        TransformAxis rotation1: coordinates=pro_sup_l axis=(0.01716099 -0.9926656 -0.119668)
            LinearFunction(coefficients=1 0)
    CustomJoint radiocarpal_l: socket_parent_frame=radius_l_offset socket_child_frame=proximal_row_l_offset
      Coordinate deviation_l: default_value=2.220861e-7 range=(-0.1745329 0.4363323) clamped=true
      Coordinate flexion_l: default_value=0.2852695 range=(-1.22173 1.22173) clamped=true
      PhysicalOffsetFrame radius_l_offset: socket_parent=/bodyset/radius_l translation=(0.018 -0.242 -0.025)
      PhysicalOffsetFrame proximal_row_l_offset: socket_parent=/bodyset/proximal_row_l translation=(0 0 0)
      SpatialTransform: axes_held_at_zero=(rotation2 translation1 translation2 translation3)
        TransformAxis rotation1: coordinates=deviation_l axis=(0.819064 0.135611 -0.557444)
          SimmSpline: x=(-0.174533 0 0.436332) y=(-0.174533 0 0.436332)
        TransformAxis rotation3: coordinates=flexion_l axis=(-0.9564267 0.2522069 0.147104)
          SimmSpline: x=(-1.5708 1.5708) y=(-0.785398 0.785398)
    CustomJoint wrist_hand_l: socket_parent_frame=proximal_row_l_offset socket_child_frame=hand_l_offset
      Coordinate wrist_hand_r1_l: default_value=3.014021e-7 range=(-99999.9 99999.9) clamped=false
      Coordinate wrist_hand_r3_l: default_value=0.1426347 range=(-99999.9 99999.9) clamped=false
      PhysicalOffsetFrame proximal_row_l_offset: socket_parent=/bodyset/proximal_row_l
          translation=(0.003992 -0.015054 -0.002327)
      PhysicalOffsetFrame hand_l_offset: socket_parent=/bodyset/hand_l translation=(0 0 0)
      SpatialTransform: axes_held_at_zero=(rotation3 translation1 translation2 translation3)
        TransformAxis rotation1: coordinates=wrist_hand_r1_l axis=(-0.8991357 0.3490529 -0.2640399)
            LinearFunction(coefficients=1 0)
        TransformAxis rotation2: coordinates=wrist_hand_r3_l axis=(-0.9971185 -0.01069999 -0.07510096)
            LinearFunction(coefficients=1 0)
  ConstraintSet:
    CoordinateCouplerConstraint LB_wrapjnt_r3_con: independent_coordinate_names=flex_extension
        dependent_coordinate_name=LB_wrapjnt_r3 scale_factor=1
        coupled_coordinates_function=PiecewiseLinearFunction(x=0 1, y=0 0.6)
    CoordinateCouplerConstraint LB_wrapjnt_t1_con: independent_coordinate_names=flex_extension
        dependent_coordinate_name=LB_wrapjnt_t1 scale_factor=1
      coupled_coordinates_function: PiecewiseLinearFunction: x=(0 0.453786) y=(0 0.015)
    CoordinateCouplerConstraint LB_wrapjnt_t2_con: independent_coordinate_names=flex_extension
        dependent_coordinate_name=LB_wrapjnt_t2 scale_factor=1
      coupled_coordinates_function: PiecewiseLinearFunction: x=(0 0.453786) y=(0 0.005)
    CoordinateCouplerConstraint Abs_r3_con: independent_coordinate_names=flex_extension
        dependent_coordinate_name=Abs_r3 scale_factor=1
      coupled_coordinates_function: PiecewiseLinearFunction: x=(-1.22173 0) y=(-0.785398 0)
    CoordinateCouplerConstraint L4_L5_IVDjnt_r3_con: independent_coordinate_names=flex_extension
        dependent_coordinate_name=L4_L5_IVDjnt_r3 scale_factor=1
        coupled_coordinates_function=LinearFunction(coefficients=0.144 0)
    CoordinateCouplerConstraint L4_L5_IVD_rotjnt_r2_con: independent_coordinate_names=axial_rotation
        dependent_coordinate_name=L4_L5_IVD_rotjnt_r2 scale_factor=1
      coupled_coordinates_function: PiecewiseLinearFunction f452: x=(-0.785398 0 0.785398) y=(-0.0331613 0 0.0331613)
    CoordinateCouplerConstraint L4_L5_IVD_bendjnt_r1_con: independent_coordinate_names=lat_bending
        dependent_coordinate_name=L4_L5_IVD_bendjnt_r1 scale_factor=1
      coupled_coordinates_function: PiecewiseLinearFunction f61: x=(-1.01875 1.01875) y=(-0.184481 0.184481)
    CoordinateCouplerConstraint L3_L4_IVDjnt_r3_con: independent_coordinate_names=flex_extension
        dependent_coordinate_name=L3_L4_IVDjnt_r3 scale_factor=1
        coupled_coordinates_function=LinearFunction(coefficients=0.204745 0)
    CoordinateCouplerConstraint L3_L4_IVD_rotjnt_r2_con: independent_coordinate_names=axial_rotation
        dependent_coordinate_name=L3_L4_IVD_rotjnt_r2 scale_factor=1
      coupled_coordinates_function: PiecewiseLinearFunction f232: x=(-0.785398 0 0.785398) y=(-0.0331613 0 0.0331613)
    CoordinateCouplerConstraint L3_L4_IVD_bendjnt_r1_con: independent_coordinate_names=lat_bending
        dependent_coordinate_name=L3_L4_IVD_bendjnt_r1 scale_factor=1
      coupled_coordinates_function: PiecewiseLinearFunction f51: x=(-1.01875 1.01875) y=(-0.249931 0.249931)
    CoordinateCouplerConstraint L2_L3_IVDjnt_r3_con: independent_coordinate_names=flex_extension
        dependent_coordinate_name=L2_L3_IVDjnt_r3 scale_factor=1
        coupled_coordinates_function=LinearFunction(coefficients=0.246618 0)
    CoordinateCouplerConstraint L2_L3_IVD_rotjnt_r2_con: independent_coordinate_names=axial_rotation
        dependent_coordinate_name=L2_L3_IVD_rotjnt_r2 scale_factor=1
      coupled_coordinates_function: PiecewiseLinearFunction f232: x=(-0.785398 0 0.785398) y=(-0.0261799 0 0.0261799)
    CoordinateCouplerConstraint L2_L3_IVD_bendjnt_r1_con: independent_coordinate_names=lat_bending
        dependent_coordinate_name=L2_L3_IVD_bendjnt_r1 scale_factor=1
      coupled_coordinates_function: PiecewiseLinearFunction f41: x=(-1.01875 1.01875) y=(-0.254818 0.254818)
    CoordinateCouplerConstraint L1_L2_IVDjnt_r3_con: independent_coordinate_names=flex_extension
        dependent_coordinate_name=L1_L2_IVDjnt_r3 scale_factor=1
        coupled_coordinates_function=LinearFunction(coefficients=0.294182 0)
    CoordinateCouplerConstraint L1_L2_IVD_rotjnt_r2_con: independent_coordinate_names=axial_rotation
        dependent_coordinate_name=L1_L2_IVD_rotjnt_r2 scale_factor=1
      coupled_coordinates_function: PiecewiseLinearFunction f32: x=(-0.785398 0 0.785398) y=(-0.0226893 0 0.0226893)
    CoordinateCouplerConstraint L1_L2_IVD_bendjnt_r1_con: independent_coordinate_names=lat_bending
        dependent_coordinate_name=L1_L2_IVD_bendjnt_r1 scale_factor=1
      coupled_coordinates_function: PiecewiseLinearFunction f31: x=(-1.01875 1.01875) y=(-0.191463 0.191463)
    CoordinateCouplerConstraint patellofemoral_knee_angle_r_con: independent_coordinate_names=knee_angle_r
        dependent_coordinate_name=knee_angle_r_beta scale_factor=1
        coupled_coordinates_function=LinearFunction(coefficients=-1 0)
    CoordinateCouplerConstraint patellofemoral_knee_angle_l_con: independent_coordinate_names=knee_angle_l
        dependent_coordinate_name=knee_angle_l_beta scale_factor=1
        coupled_coordinates_function=LinearFunction(coefficients=-1 0)
    CoordinateCouplerConstraint Torso_rot_con: independent_coordinate_names=axial_rotation
        dependent_coordinate_name=Torso_Rot scale_factor=1
      coupled_coordinates_function: PiecewiseLinearFunction f40: x=(-0.11 0 0.11) y=(-0.0226209 0 0.0226209)
    CoordinateCouplerConstraint sternoclavicular_r2_con: independent_coordinate_names=shoulder_elv
        dependent_coordinate_name=sternoclavicular_r2 scale_factor=1
      coupled_coordinates_function: SimmSpline: x=(0 2.61799) y=(0 -0.633555)
    CoordinateCouplerConstraint sternoclavicular_r3_con: independent_coordinate_names=shoulder_elv
        dependent_coordinate_name=sternoclavicular_r3 scale_factor=1
      coupled_coordinates_function: SimmSpline: x=(0 3.14159) y=(0 0.322013)
    CoordinateCouplerConstraint unrotscap_r2_con: independent_coordinate_names=shoulder_elv
        dependent_coordinate_name=unrotscap_r2 scale_factor=1
      coupled_coordinates_function: SimmSpline: x=(0 2.61799) y=(0 0.633555)
    CoordinateCouplerConstraint unrotscap_r3_con: independent_coordinate_names=shoulder_elv
        dependent_coordinate_name=unrotscap_r3 scale_factor=1
      coupled_coordinates_function: SimmSpline: x=(0 3.14159) y=(0 -0.322013)
    CoordinateCouplerConstraint acromioclavicular_r1_con: independent_coordinate_names=shoulder_elv
        dependent_coordinate_name=acromioclavicular_r1 scale_factor=1
      coupled_coordinates_function: SimmSpline: x=(0 2.61799) y=(0 0.466003)
    CoordinateCouplerConstraint acromioclavicular_r2_con: independent_coordinate_names=shoulder_elv
        dependent_coordinate_name=acromioclavicular_r2 scale_factor=1
      coupled_coordinates_function: SimmSpline: x=(0 2.61799) y=(0 -0.128282)
    CoordinateCouplerConstraint acromioclavicular_r3_con: independent_coordinate_names=shoulder_elv
        dependent_coordinate_name=acromioclavicular_r3 scale_factor=1
      coupled_coordinates_function: SimmSpline: x=(0 2.61799) y=(0 1.03673)
    CoordinateCouplerConstraint unrothum_r1_con: independent_coordinate_names=shoulder_elv
        dependent_coordinate_name=unrothum_r1 scale_factor=1
      coupled_coordinates_function: SimmSpline: x=(0 2.61799) y=(0 -0.466003)
    CoordinateCouplerConstraint unrothum_r2_con: independent_coordinate_names=shoulder_elv
        dependent_coordinate_name=unrothum_r2 scale_factor=1
      coupled_coordinates_function: SimmSpline: x=(0 2.61799) y=(0 0.128282)
    CoordinateCouplerConstraint unrothum_r3_con: independent_coordinate_names=shoulder_elv
        dependent_coordinate_name=unrothum_r3 scale_factor=1
      coupled_coordinates_function: SimmSpline: x=(0 2.61799) y=(0 -1.03673)
    CoordinateCouplerConstraint shoulder1_r2_con: independent_coordinate_names=elv_angle
        dependent_coordinate_name=shoulder1_r2 scale_factor=1
      coupled_coordinates_function: SimmSpline: x=(-1.5708 3.14159) y=(1.5708 -3.14159)
    CoordinateCouplerConstraint wrist_hand_r1_con: independent_coordinate_names=deviation
        dependent_coordinate_name=wrist_hand_r1 scale_factor=1
      coupled_coordinates_function: SimmSpline f18: x=(-0.174533 0 0.436332) y=(-0.261799 0 0.436332)
    CoordinateCouplerConstraint wrist_hand_r3_con: independent_coordinate_names=flexion
        dependent_coordinate_name=wrist_hand_r3 scale_factor=1
      coupled_coordinates_function: SimmSpline f19: x=(-1.22173 1.22173) y=(-0.610865 0.610865)
    CoordinateCouplerConstraint sternoclavicular_r2_con_l: independent_coordinate_names=shoulder_elv_l
        dependent_coordinate_name=sternoclavicular_r2_l scale_factor=1
      coupled_coordinates_function: SimmSpline: x=(0 2.61799) y=(0 -0.633555)
    CoordinateCouplerConstraint sternoclavicular_r3_con_l: independent_coordinate_names=shoulder_elv_l
        dependent_coordinate_name=sternoclavicular_r3_l scale_factor=1
      coupled_coordinates_function: SimmSpline: x=(0 3.14159) y=(0 0.322013)
    CoordinateCouplerConstraint unrotscap_r2_con_l: independent_coordinate_names=shoulder_elv_l
        dependent_coordinate_name=unrotscap_r2_l scale_factor=1
      coupled_coordinates_function: SimmSpline: x=(0 2.61799) y=(0 0.633555)
    CoordinateCouplerConstraint unrotscap_r3_con_l: independent_coordinate_names=shoulder_elv_l
        dependent_coordinate_name=unrotscap_r3_l scale_factor=1
      coupled_coordinates_function: SimmSpline: x=(0 3.14159) y=(0 -0.322013)
    CoordinateCouplerConstraint acromioclavicular_r1_con_l: independent_coordinate_names=shoulder_elv_l
        dependent_coordinate_name=acromioclavicular_r1_l scale_factor=1
      coupled_coordinates_function: SimmSpline: x=(0 2.61799) y=(0 0.466003)
    CoordinateCouplerConstraint acromioclavicular_r2_con_l: independent_coordinate_names=shoulder_elv_l
        dependent_coordinate_name=acromioclavicular_r2_l scale_factor=1
      coupled_coordinates_function: SimmSpline: x=(0 2.61799) y=(0 -0.128282)
    CoordinateCouplerConstraint acromioclavicular_r3_con_l: independent_coordinate_names=shoulder_elv_l
        dependent_coordinate_name=acromioclavicular_r3_l scale_factor=1
      coupled_coordinates_function: SimmSpline: x=(0 2.61799) y=(0 1.03673)
    CoordinateCouplerConstraint unrothum_r1_con_l: independent_coordinate_names=shoulder_elv_l
        dependent_coordinate_name=unrothum_r1_l scale_factor=1
      coupled_coordinates_function: SimmSpline: x=(0 2.61799) y=(0 -0.466003)
    CoordinateCouplerConstraint unrothum_r2_con_l: independent_coordinate_names=shoulder_elv_l
        dependent_coordinate_name=unrothum_r2_l scale_factor=1
      coupled_coordinates_function: SimmSpline: x=(0 2.61799) y=(0 0.128282)
    CoordinateCouplerConstraint unrothum_r3_con_l: independent_coordinate_names=shoulder_elv_l
        dependent_coordinate_name=unrothum_r3_l scale_factor=1
      coupled_coordinates_function: SimmSpline: x=(0 2.61799) y=(0 -1.03673)
    CoordinateCouplerConstraint shoulder1_r2_con_l: independent_coordinate_names=elv_angle_l
        dependent_coordinate_name=shoulder1_r2_l scale_factor=1
      coupled_coordinates_function: SimmSpline: x=(-1.5708 3.14159) y=(1.5708 -3.14159)
    CoordinateCouplerConstraint wrist_hand_r1_con_l: independent_coordinate_names=deviation_l
        dependent_coordinate_name=wrist_hand_r1_l scale_factor=1
      coupled_coordinates_function: SimmSpline f18_l: x=(-0.174533 0 0.436332) y=(-0.261799 0 0.436332)
    CoordinateCouplerConstraint wrist_hand_r3_con_l: independent_coordinate_names=flexion_l
        dependent_coordinate_name=wrist_hand_r3_l scale_factor=1
      coupled_coordinates_function: SimmSpline f19_l: x=(-1.22173 1.22173) y=(-0.610865 0.610865)
  MarkerSet:
    Marker RACR: torso (-0.003 0.4440745 0.1627938)
    Marker LACR: torso (-0.004654853 0.4401534 -0.1968973)
    Marker C7: torso (-0.085 0.4522784 0.00165426)
    Marker STER: torso (0.04749429 0.3755486 0.001985315)
    Marker RUA1: humerus (-0.02353416 -0.1089745 -0.01801153)
    Marker RUA2: humerus (-0.02527138 -0.1031503 0.02570872)
    Marker RUA3: humerus (-0.02470972 -0.1478337 0.02511456)
    Marker RFA1: radius (-0.02062877 -0.1579688 0.02718504)
    Marker RRSP: radius (0.0005 -0.225 0.05)
    Marker RUSP: radius (-0.022 -0.225 -0.022)
    Marker LUA1: humerus_l (-0.02754263 -0.1016125 -0.02678521)
    Marker LUA4: humerus_l (-0.02573309 -0.1543527 -0.02556389)
    Marker LUA3: humerus_l (-0.01932306 -0.146932 0.02542987)
    Marker LHLE: humerus_l (-0.0162947 -0.28 0.004275436)
    Marker LFA1: radius_l (-0.03307332 -0.1633931 -0.02886474)
    Marker LRSP: radius_l (0.0005 -0.225 -0.05)
    Marker LUSP: radius_l (-0.022 -0.225 0.022)
    Marker RASIS: pelvis (0.00953047 0.0180816 0.128464)
    Marker LASIS: pelvis (0.00953047 0.0180816 -0.128464)
    Marker RPSIS: pelvis (-0.155 0.035 0.045)
    Marker LPSIS: pelvis (-0.155 0.035 -0.045)
    Marker RTH1: femur_r (-0.009704114 -0.1924847 0.07561978)
    Marker RTH2: femur_r (0.04383515 -0.1912616 0.0706889)
    Marker RTH3: femur_r (0.04144143 -0.2723741 0.06717324)
    Marker RFLE: femur_r (0 -0.404 0.05)
    Marker RFME: femur_r (0 -0.404 -0.05)
    Marker RSK1: tibia_r (-0.01535722 -0.1350127 0.05359929)
    Marker RSK2: tibia_r (0.03478395 -0.1354446 0.05264357)
    Marker RSK4: tibia_r (-0.01649925 -0.190491 0.05563615)
    Marker RFAL: tibia_r (-0.005 -0.4051024 0.053)
    Marker RTAM: tibia_r (0.006 -0.3888 -0.038)
    Marker RFCC: calcn_r (-0.025 0.02 -0.005)
    Marker LTH1: femur_l (0.04261649 -0.2085854 -0.07035882)
    Marker LTH2: femur_l (-0.01472362 -0.2087204 -0.06566144)
    Marker LTH3: femur_l (-0.01881999 -0.292637 -0.06513241)
    Marker LFLE: femur_l (0 -0.404 -0.05)
    Marker LFME: femur_l (0 -0.404 0.05)
    Marker LSK1: tibia_l (0.0267701 -0.1423274 -0.05333397)
    Marker LSK2: tibia_l (-0.02345804 -0.1476141 -0.04441528)
    Marker LSK3: tibia_l (-0.02338592 -0.2030472 -0.06136068)
    Marker LFAL: tibia_l (-0.005 -0.399471 -0.053)
    Marker LTAM: tibia_l (0.006 -0.3888 0.038)
    Marker LFCC: calcn_l (-0.025 0.02 0.005)
    Marker XPRO: torso (0.1165682 0.2323189 -0.0002817169)
    Marker T4: torso (-0.1052096 0.3446583 0.0005576274)
    Marker T8: torso (-0.115098 0.2476391 0.0004471404)
    Marker T10: torso (-0.1059094 0.19575 0.0005861879)
    Marker RHME: humerus (0.04303875 -0.2735082 -0.06069349)
    Marker RHLE: humerus (-0.01790884 -0.28 -0.008154637)
    Marker LHME: humerus_l (0.03899232 -0.2664217 0.07373212)
    Marker RTEMP: torso (0.05191243 0.5930127 0.06546593)
    Marker LTEMP: torso (0.05361207 0.5909714 -0.06114695)
    Marker RHEAD: torso (0.08775295 0.60357 0.02234055)
    Marker LHEAD: torso (0.08507691 0.6017967 -0.0210064)
    Marker RICR: pelvis (-0.1110066 0.09783551 0.1315069)
    Marker LICR: pelvis (-0.09066688 0.09365548 -0.1343373)
    Marker LUA2: humerus_l (-0.02465692 -0.1096962 0.01510835)
    Marker RUA4: humerus (-0.02555405 -0.1519068 -0.01969667)
    Marker LFA2: ulna_l (-0.05342332 -0.1674098 -0.01317968)
    Marker LFA3: radius_l (-0.04081415 -0.1925753 -0.007318294)
    Marker RFA2: ulna (-0.04824988 -0.180348 0.01646709)
    Marker RFA3: radius (-0.03367275 -0.1982053 0.01727627)
    Marker RTH4: femur_r (-0.01673003 -0.2706077 0.06918237)
    Marker LTH4: femur_l (0.03525558 -0.2903142 -0.06943175)
    Marker RSK3: tibia_r (0.03546154 -0.1972744 0.05139194)
    Marker LSK4: tibia_l (0.02739084 -0.2099703 -0.04891357)
    Marker RFMT1: calcn_r (0.185378 0.01862883 -0.02622646)
    Marker RFMT2: calcn_r (0.1797485 0.01514865 0.002352285)
    Marker RFMT5: calcn_r (0.1400339 0.01797807 0.04171759)
    Marker LFMT1: calcn_l (0.179664 0.02148962 0.02721203)
    Marker LFMT2: calcn_l (0.1774792 0.01577402 -0.001397294)
    Marker LFMT5: calcn_l (0.1406686 0.01678265 -0.04065561)
